l1 := 0.375
w := 0.1
R := 0.15
μ := 0.998
Ukm := 10
mg := 2000
h := 0.25
fi := (π*45)/180
m := 200
U := Ukm*1000/3600 = 2.77778
m := 200
Ukm_pand := 1
Wtest := 5.6
Wlinear := U/R = 18.5185
μ2 := 0.01
μ2 := 0.01
Utest := Wtest*R = 0.84
U_pand := Ukm_pand*1000/3600 = 0.277778
t := 5
Ukmtest := Utest*3600/1000 = 3.024
ε := Wlinear/t = 3.7037
ddotX := U/t = 0.555556
Wlinear_pand := U_pand/R = 1.85185
m_wheel := 1.5
t := 5
ddotX_pand := U_pand/t = 0.0555556
Jo := 0.5*m_wheel*R^2*ε = 0.0625
ε_pand := Wlinear_pand/t = 0.37037
Jk := (m*ddotX)*R = 16.6667
Jo_pand := 0.5*m_wheel*R^2*ε_pand = 0.00625
m_wheel := 1.5
Mk := mg*μ2 = 20
Jk_pand := (m*ddotX_pand + mg*sin(fi))*R = 213.799
n := 0.65
Mk_pand := mg*cos(fi)*μ2 = 14.1421
Md := Jo + Jk + Mk = 36.7292
Md_pand := Jo_pand + Jk_pand + Mk_pand = 227.947
Nd := Md*Wlinear = 680.17
Nd_pand := Md_pand*Wlinear_pand = 422.124
Nd_real := 1.2*Nd/n = 1255.7
Nd_pand_real := 1.2*Nd_pand/n = 779.306
N1_pand := Nd_pand_real/6 = 129.884
N1m := Nd_real/6 = 209.283
Mp := 0.25*l1*mg = 187.5
Nd := Mp*0.1 = 18.75
N3 := 1/6*mg = 333.333
N1 := 2*N3 = 666.667
l3 := 1 - R = 0.85
l2 := (l1 + R)*cos(fi) = 0.371231
Np_real := 1.2*Nd/0.35 = 64.2857
m1 := 9.7
m1g := m1*9.8 = 95.06
Mp := (m1g*l1*cos(fi))/2 + (N1*l1*cos(fi))/2 + μ*N1*(R + (l1*cos(fi)/2)*sin(fi)) = 263.167
Np := Mp*w = 26.3167
Npreal := 1.5*Np/n = 60.7308
Md := ((μ*N3*h + N3*l3 + μ*N1*h + N1*l2 + mg*l2 + Mp)/3) = 595.316
Nd := Md*w = 59.5316
Ndreal := 1.5*Nd/n = 137.381
Ndreal_all := 6*Ndreal + 2*Npreal = 945.746
